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/batch
! ANSYS input file written by Workbench version 2024 R2
! File used for geometry attach: Z:\Developer\MIT_Rkt_Team\MIT_Rkt_Aurora_Aero\MIT_Rkt_Aurora_Aero\finFEA\wspc_FEA_files\dp0\global\MECH\SYS\AssembledModel\SYS.pmdb
/title,wspc_FEA--Structure statique (C3)
/COM,/COM,     ANSYSMotion, 2024.2
/com,--- Data in consistent NMM units. See Solving Units in the help system for more information.
/units,MPA
/prep7
! Turn off shape checking because checks already performed inside WB mesher.
! See help system for more information.
SHPP,OFF,,NOWARN
etcon,set             ! allow ANSYS to choose best KEYOP's for 180x elements, resets any applicable keyopt to MAPDL defaults
/com,*********** Nodes for the whole assembly ***********
nblock,3,,3366
(1i9,3e20.9e3)
        1     3.478679657E+02     1.000000000E+01    -2.381250000E+01
        2     3.478679657E+02     1.776400000E+02    -2.381250000E+01
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-1
/com,*********** Elements for Body 1 'bonding_COMPLETE\Fel_let(ACP (Pre))' ***********
et,1,181
keyo,1,1,0          ! bending and membrane stiffness
keyo,1,3,2
keyo,1,8,2          ! set Layer data storage
eblock,19,solid,,5900
(19i9)
        1        1        1        1        0        0        0        0        4        0        1        3        5     3002     3002
        1        1        1        1        0        0        0        0        4        0        2        3     2896        5        5
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-1
/com,*********** Send User Defined Coordinate System(s) ***********
local,12,0,0.,0.,0.,0.,0.,0.
local,13,0,0.,0.,0.,0.,0.,0.
csys,0
toffst,273.15,      ! Temperature offset from absolute zero
/com,*********** Set Reference Temperature ***********
tref,22.
/com,*********** Send Materials ***********
MP,DENS,1,1.451e-09,	! tonne mm^-3
MP,EX,1,59160,	! tonne s^-2 mm^-1
MP,EY,1,59160,	! tonne s^-2 mm^-1
MP,EZ,1,7500,	! tonne s^-2 mm^-1
MP,PRXY,1,0.04,
MP,PRYZ,1,0.3,
MP,PRXZ,1,0.3,
MP,GXY,1,3300,	! tonne s^-2 mm^-1
MP,GYZ,1,2700,	! tonne s^-2 mm^-1
MP,GXZ,1,2700,	! tonne s^-2 mm^-1

TB,FCLI,1,1,9,2
TBDATA,1,0.0092,-0.0084,0.0092,-0.0084,0.0078,-0.011
TBDATA,7,0.02,0.015
MP,ALPX,1,2.2e-06,	! C^-1
MP,ALPY,1,2.2e-06,	! C^-1
MP,ALPZ,1,1e-05,	! C^-1

TB,FCLI,1,1,20,1
TBDATA,1,513
TBDATA,2,-437
TBDATA,3,513
TBDATA,4,-437
TBDATA,5,50
TBDATA,6,-150
TBDATA,7,120
TBDATA,8,55
TBDATA,9,55
TBDATA,10,-1
TBDATA,11,-1
TBDATA,12,-1

/com,*********** Send Sheet Properties ***********
sectype,1,shell
secdata,3.2
secoff,mid


/com,*********** Sending Coordinate Systems for External Layered Section***********
local,14,0,234.009093404915,176.692881355932,-23.8125,-180.,0.,0.
local,15,0,70.9,3.2,-116.3,0.,0.,-90.
csys,0

/com,*********** Sending Materials for External Layered Section***********
MP,DENS,2,1.451e-09,	! tonne mm^-3
MP,EX,2,59160,	! tonne s^-2 mm^-1
MP,EY,2,59160,	! tonne s^-2 mm^-1
MP,EZ,2,7500,	! tonne s^-2 mm^-1
MP,PRXY,2,0.04,
MP,PRYZ,2,0.3,
MP,PRXZ,2,0.3,
MP,GXY,2,3300,	! tonne s^-2 mm^-1
MP,GYZ,2,2700,	! tonne s^-2 mm^-1
MP,GXZ,2,2700,	! tonne s^-2 mm^-1

TB,FCLI,2,1,9,2
TBDATA,1,0.0092,-0.0084,0.0092,-0.0084,0.0078,-0.011
TBDATA,7,0.02,0.015
MP,ALPX,2,2.2e-06,	! C^-1
MP,ALPY,2,2.2e-06,	! C^-1
MP,ALPZ,2,1e-05,	! C^-1

TB,FCLI,2,1,20,1
TBDATA,1,513
TBDATA,2,-437
TBDATA,3,513
TBDATA,4,-437
TBDATA,5,50
TBDATA,6,-150
TBDATA,7,120
TBDATA,8,55
TBDATA,9,55
TBDATA,10,-1
TBDATA,11,-1
TBDATA,12,-1


/com,*********** Send External Layered Section Properties ***********
CMBLOCK,_CM_EXT_SEC_0,ELEM,     5900
(8i10)
         1         2         3         4         5         6         7         8
         9        10        11        12        13        14        15        16
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sectype,3,shell
secdata,0.229,2,0
secoff,bottom
emod,_cm_ext_sec_0,secnum,3
emod,1,esys,14
emod,2,esys,14
emod,3,esys,14
emod,4,esys,14
emod,5,esys,14
emod,6,esys,14
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emod,5900,esys,14

!************************* Model Summary ********************
!bonding_COMPLETE\Felület(ACP (Pre)),	Époxy Carbone Tissé (230 GPa) humide,	matid,	1
!************************* End Model Summary ********************
/com,*********** Create Contact "Li_ totalement - bonding_COMPLETE\Fel_let(ACP (Pre)) Vers bonding_COMPLETE\Fel_let(ACP (Pre))" ***********
*set,_bid,5
et,_bid,188
type,_bid
real,_bid
mat,_bid
secnum,_bid
n,3153,347.8999657213,10.032,-23.7805
en,5967,3153,1
en,5968,3153,1
n,3154,38.0199657212996,10.032,-23.7805
en,5969,3154,4
en,5970,3154,4
n,3155,44.2175657212996,10.032,-23.7805
en,5971,3155,2847
en,5972,3155,2847
n,3156,50.4151657212996,10.032,-23.7805
en,5973,3156,2848
en,5974,3156,2848
n,3157,56.6127657212996,10.032,-23.7805
en,5975,3157,2849
en,5976,3157,2849
n,3158,62.8103657212996,10.032,-23.7805
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MP,EX,5,18600,	! tonne s^-2 mm^-1
MP,NUXY,5,0.27,
MP,ALPX,5,5e-06,	! C^-1
MP,KXX,5,1.27,	! tonne mm s^-3 C^-1
MP,C,5,802000000,	! mm^2 s^-2 C^-1

sectype,_bid,beam,csolid
secdata,1.
secoffset,cent
nsel,all
esel,all
nsel,all
esel,all
/com,*********** Fixed Supports ***********
CMBLOCK,_FIXEDSU,NODE,       51
(8i10)
         1         4      2847      2848      2849      2850      2851      2852
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cmsel,s,_FIXEDSU
d,all,all
nsel,all
/com,*********** Define Pressure Using Surface Effect Elements "Pression" ***********
et,6,154
mat,6
eblock,10,,,5900
(15i9)
     6069        6        6        6        0        3        5     3002     3002
     6070        6        6        6        0        3     2896        5        5
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-1
esel,s,type,,6
keyop,6,7,0         ! Use deformed area for application of load
esel,all

*DIM,_loadvari133,TABLE,11,1,1,TIME, , , 0
! Time values
*TAXIS,_loadvari133(1),1,0.,1.,2.,3.,4.,5.,6.,7.,8.,9.
*TAXIS,_loadvari133(11),1,10.
! Load values
_loadvari133(1,1,1) = 0.
_loadvari133(2,1,1) = 0.5619
_loadvari133(3,1,1) = 0.56191
_loadvari133(4,1,1) = 0.56192
_loadvari133(5,1,1) = 0.56193
_loadvari133(6,1,1) = 0.56194
_loadvari133(7,1,1) = 0.56195
_loadvari133(8,1,1) = 0.56196
_loadvari133(9,1,1) = 0.56197
_loadvari133(10,1,1) = 0.56198
_loadvari133(11,1,1) = 0.56199


esel,all
fini
/com,****************************************************************************
/com,*************************    SOLUTION       ********************************
/com,****************************************************************************
/solu
antype,0                   ! static analysis
neqit,1,force              ! Force 1 eq iteration since only nonlinearity is bonded/no sep contact
pred,off
_thickRatio=  0     ! Ratio of thick parts in the model
eqsl,sparse,,,,,1
cntr,print,1               ! print out contact info and also make no initial contact an error
cncheck,dmp		!	Enable program controlled contact splitting for distributed memory parallel run
dmpoption,emat,no             ! Don't combine emat file for DANSYS
dmpoption,esav,no             ! Don't combine esav file for DANSYS
nldiag,cont,iter           ! print out contact info each equilibrium iteration
rescontrol,,none                 ! Do not keep any restart files
/com,****************************************************
/com,******************* SOLVE FOR LS 1 OF 10 ****************
esel,s,type,,6
nsle
sf,all,pres,%_loadvari133%
nsel,all
esel,all
esel,all
nsub,1,1,1
time,1.
outres,erase
outres,all,none
outres,nsol,all,
outres,rsol,all
outres,eangl,all
outres,etmp,all
outres,veng,all
outres,strs,all,
outres,epel,all,
outres,eppl,all,
outres,cont,all,
! *********** WB SOLVE COMMAND ***********
! check interactive state
*get,ANSINTER_,active,,int
*if,ANSINTER_,ne,0,then
/eof
*endif
solve
/com *************** Write FE CONNECTORS *********
CEWRITE,file,ce,,INTE
/com,****************************************************
/com,*************** FINISHED SOLVE FOR LS 1 *************
/com,****************************************************
/com,******************* SOLVE FOR LS 2 OF 10 ****************
esel,all
nsub,1,1,1
time,2.
outres,erase
outres,all,none
outres,nsol,all,
outres,rsol,all
outres,eangl,all
outres,etmp,all
outres,veng,all
outres,strs,all,
outres,epel,all,
outres,eppl,all,
outres,cont,all,
solve
/com,****************************************************
/com,*************** FINISHED SOLVE FOR LS 2 *************
/com,****************************************************
/com,******************* SOLVE FOR LS 3 OF 10 ****************
esel,all
nsub,1,1,1
time,3.
outres,erase
outres,all,none
outres,nsol,all,
outres,rsol,all
outres,eangl,all
outres,etmp,all
outres,veng,all
outres,strs,all,
outres,epel,all,
outres,eppl,all,
outres,cont,all,
solve
/com,****************************************************
/com,*************** FINISHED SOLVE FOR LS 3 *************
/com,****************************************************
/com,******************* SOLVE FOR LS 4 OF 10 ****************
esel,all
nsub,1,1,1
time,4.
outres,erase
outres,all,none
outres,nsol,all,
outres,rsol,all
outres,eangl,all
outres,etmp,all
outres,veng,all
outres,strs,all,
outres,epel,all,
outres,eppl,all,
outres,cont,all,
solve
/com,****************************************************
/com,*************** FINISHED SOLVE FOR LS 4 *************
/com,****************************************************
/com,******************* SOLVE FOR LS 5 OF 10 ****************
esel,all
nsub,1,1,1
time,5.
outres,erase
outres,all,none
outres,nsol,all,
outres,rsol,all
outres,eangl,all
outres,etmp,all
outres,veng,all
outres,strs,all,
outres,epel,all,
outres,eppl,all,
outres,cont,all,
solve
/com,****************************************************
/com,*************** FINISHED SOLVE FOR LS 5 *************
/com,****************************************************
/com,******************* SOLVE FOR LS 6 OF 10 ****************
esel,all
nsub,1,1,1
time,6.
outres,erase
outres,all,none
outres,nsol,all,
outres,rsol,all
outres,eangl,all
outres,etmp,all
outres,veng,all
outres,strs,all,
outres,epel,all,
outres,eppl,all,
outres,cont,all,
solve
/com,****************************************************
/com,*************** FINISHED SOLVE FOR LS 6 *************
/com,****************************************************
/com,******************* SOLVE FOR LS 7 OF 10 ****************
esel,all
nsub,1,1,1
time,7.
outres,erase
outres,all,none
outres,nsol,all,
outres,rsol,all
outres,eangl,all
outres,etmp,all
outres,veng,all
outres,strs,all,
outres,epel,all,
outres,eppl,all,
outres,cont,all,
solve
/com,****************************************************
/com,*************** FINISHED SOLVE FOR LS 7 *************
/com,****************************************************
/com,******************* SOLVE FOR LS 8 OF 10 ****************
esel,all
nsub,1,1,1
time,8.
outres,erase
outres,all,none
outres,nsol,all,
outres,rsol,all
outres,eangl,all
outres,etmp,all
outres,veng,all
outres,strs,all,
outres,epel,all,
outres,eppl,all,
outres,cont,all,
solve
/com,****************************************************
/com,*************** FINISHED SOLVE FOR LS 8 *************
/com,****************************************************
/com,******************* SOLVE FOR LS 9 OF 10 ****************
esel,all
nsub,1,1,1
time,9.
outres,erase
outres,all,none
outres,nsol,all,
outres,rsol,all
outres,eangl,all
outres,etmp,all
outres,veng,all
outres,strs,all,
outres,epel,all,
outres,eppl,all,
outres,cont,all,
solve
/com,****************************************************
/com,*************** FINISHED SOLVE FOR LS 9 *************
/com,****************************************************
/com,******************* SOLVE FOR LS 10 OF 10 ****************
esel,all
nsub,1,1,1
time,10.
outres,erase
outres,all,none
outres,nsol,all,
outres,rsol,all
outres,eangl,all
outres,etmp,all
outres,veng,all
outres,strs,all,
outres,epel,all,
outres,eppl,all,
outres,cont,all,
solve
/com,****************************************************
/com,*************** FINISHED SOLVE FOR LS 10 *************
save,file,db
*get,_NSOLTHREADS,active,0,ntfs
*get,_NSOLPROCESSES,active,0,npfs
/post1
fini
